<!-- Automatic Hexahedron removing with Hexa2Quad mapping example: Element removed are define in: ./RemovingHexa2QuadProcess.txt -->
<Node name="root" dt="0.01" showBoundingTree="0" gravity="0 -9.81 0">
    <RequiredPlugin pluginName="SofaMiscCollision" />
    <RequiredPlugin pluginName="SofaOpenglVisual"/>
    <RequiredPlugin pluginName='SofaMiscTopology'/>
    <RequiredPlugin pluginName='SofaTopologyMapping'/>
    <RequiredPlugin pluginName='SofaGeneralSimpleFem'/>
    <RequiredPlugin pluginName='SofaImplicitOdeSolver'/>
    <RequiredPlugin pluginName='SofaBoundaryCondition'/>
    <RequiredPlugin pluginName='SofaGeneralDeformable'/>
    <RequiredPlugin pluginName='SofaMeshCollision'/>

    <VisualStyle displayFlags="showBehaviorModels" />
    <DefaultPipeline verbose="0" />
    <BruteForceDetection name="N2" />
    <DefaultContactManager response="default" />
    <MinProximityIntersection name="Proximity" alarmDistance="0.8" contactDistance="0.5" />
    <DefaultCollisionGroupManager />
    <Node name="H">
        <EulerImplicitSolver name="cg_odesolver" printLog="false"  rayleighStiffness="0.1" rayleighMass="0.1" />
        <CGLinearSolver iterations="25" name="linear solver" tolerance="1.0e-9" threshold="1.0e-9" />
        <MeshGmshLoader name="loader" filename="mesh/nine_hexa.msh" />
        <MechanicalObject src="@loader" name="Hexa" />
        <HexahedronSetTopologyContainer name="Hexa_topo" src="@loader" />
        <HexahedronSetTopologyModifier name="Modifier" />
        <HexahedronSetGeometryAlgorithms name="GeomAlgo" template="Vec3d" />
        <TopologicalChangeProcessor listening="1" filename="RemovingHexa2QuadProcess.txt" />
        <HexahedralFEMForceField name="FEM" youngModulus="100" poissonRatio="0.3" method="large" />
        <DiagonalMass massDensity="0.5" />
        <FixedConstraint indices="12 15 28 31" />
<!--         <BoxConstraint box="0 3 0 0 3 1 3 3 0 3 3 1" /> -->
        <Node name="Q">
            <QuadSetTopologyContainer name="Quad_topo" src="@" tags=" " />
            <QuadSetTopologyModifier name="Modifier" />
            <QuadSetGeometryAlgorithms name="GeomAlgo" template="Vec3d" drawQuads="1" />
            <Hexa2QuadTopologicalMapping input="@../Hexa_topo" output="@Quad_topo" />
            <QuadularBendingSprings name="FEM-Bend" stiffness="3000" damping="1.0" />
            <TriangleCollisionModel />
            <!--			<Node name="Visu">
				<OglModel name="Visual" color="blue" quads="@../Container.quads" />
				<IdentityMapping input="@../../Hexa" output="@Visual" />
			</Node>-->
        </Node>
    </Node>
</Node>
